f := K1*(E1 - a11*x1 - a12*x2 - a13*x3)^2 + K2*(E2 - a21*x1 - a22*x2 - a23*x3)^2 + K3*(E3 - a31*x1 - a32*x2 - a33*x3)^2 + 0.00001*(x1*cost1 + x2*cost2 + x3*cost2)  # error: Эта переменная не определена.
d/dx1(f) simplify → 0.00001*cost1 + 2*K1*a11^2*x1 + 2*K2*a21^2*x1 + 2*K3*a31^2*x1 - 2*E1*K1*a11 - 2*E2*K2*a21 - 2*E3*K3*a31 + 2*K1*a11*a12*x2 + 2*K1*a11*a13*x3 + 2*K2*a21*a22*x2 + 2*K2*a21*a23*x3 + 2*K3*a31*a32*x2 + 2*K3*a31*a33*x3
E1*K1*a11 + E2*K2*a21 + E3*K3*a31
(2*K1*a11^2 + 2*K2*a21^2 + 2*K3*a31^2)*x1 + (2*K1*a11*a12 + 2*K2*a21*a22 + 2*K3*a31*a32)*x2 + (2*K1*a11*a13 + 2*K2*a21*a23 + 2*K3*a31*a33)*x3
d/dx2(f) simplify → 0.00001*cost2 + 2*K1*a12^2*x2 + 2*K2*a22^2*x2 + 2*K3*a32^2*x2 - 2*E1*K1*a12 - 2*E2*K2*a22 - 2*E3*K3*a32 + 2*K1*a11*a12*x1 + 2*K2*a21*a22*x1 + 2*K1*a12*a13*x3 + 2*K3*a31*a32*x1 + 2*K2*a22*a23*x3 + 2*K3*a32*a33*x3
E1*K1*a12 + E2*K2*a22 + E3*K3*a32
(2*K1*a11*a12 + 2*K2*a21*a22 + 2*K3*a31*a32)*x1 + (2*K1*a12^2 + 2*K2*a22^2 + 2*K3*a32^2)*x2 + (2*K1*a12*a13 + 2*K2*a22*a23 + 2*K3*a32*a33)*x3
d/dx3(f) simplify → 0.00001*cost2 + 2*K1*a13^2*x3 + 2*K2*a23^2*x3 + 2*K3*a33^2*x3 - 2*E1*K1*a13 - 2*E2*K2*a23 - 2*E3*K3*a33 + 2*K1*a11*a13*x1 + 2*K1*a12*a13*x2 + 2*K2*a21*a23*x1 + 2*K2*a22*a23*x2 + 2*K3*a31*a33*x1 + 2*K3*a32*a33*x2
E1*K1*a13 + E2*K2*a23 + E3*K3*a33
(2*K1*a11*a13 + 2*K2*a21*a23 + 2*K3*a31*a33)*x1 + (2*K1*a12*a13 + 2*K2*a22*a23 + 2*K3*a32*a33)*x2 + (2*K1*a13^2 + 2*K2*a23^2 + 2*K3*a33^2)*x3
g := K1*(E1 - a11*(xv1 + t*gx1) - a12*(xv2 + t*gx2) - a13*(xv3 + t*gx3))^2 + K2*(E2 - a21*(xv1 + t*gx1) - a22*(xv2 + t*gx2) - a23*(xv3 + t*gx3))^2 + K3*(E3 - a31*(xv1 + t*gx1) - a32*(xv2 + t*gx2) - a33*(xv3 + t*gx3))^2  # error: Эта переменная не определена.
d/dt(g) simplify → 2*K1*(a11*gx1 + a12*gx2 + a13*gx3)*(a11*xv1 - E1 + a12*xv2 + a13*xv3 + a11*gx1*t + a12*gx2*t + a13*gx3*t) + 2*K2*(a21*gx1 + a22*gx2 + a23*gx3)*(a21*xv1 - E2 + a22*xv2 + a23*xv3 + a21*gx1*t + a22*gx2*t + a23*gx3*t) + 2*K3*(a31*gx1 + a32*gx2 + a33*gx3)*(a31*xv1 - E3 + a32*xv2 + a33*xv3 + a31*gx1*t + a32*gx2*t + a33*gx3*t)
2*K1*(a11*gx1 + a12*gx2 + a13*gx3)*(a11*xv1 - E1 + a12*xv2 + a13*xv3 + a11*gx1*t + a12*gx2*t + a13*gx3*t) + 2*K2*(a21*gx1 + a22*gx2 + a23*gx3)*(a21*xv1 - E2 + a22*xv2 + a23*xv3 + a21*gx1*t + a22*gx2*t + a23*gx3*t) + 2*K3*(a31*gx1 + a32*gx2 + a33*gx3)*(a31*xv1 - E3 + a32*xv2 + a33*xv3 + a31*gx1*t + a32*gx2*t + a33*gx3*t)
(2*K1*(a11*gx1 + a12*gx2 + a13*gx3)^2 + 2*K2*(a21*gx1 + a22*gx2 + a23*gx3)^2 + 2*K3*(a31*gx1 + a32*gx2 + a33*gx3)^2)*t + 2*K1*(a11*gx1 + a12*gx2 + a13*gx3)*(a11*xv1 - E1 + a12*xv2 + a13*xv3) + 2*K2*(a21*gx1 + a22*gx2 + a23*gx3)*(a21*xv1 - E2 + a22*xv2 + a23*xv3) + 2*K3*(a31*gx1 + a32*gx2 + a33*gx3)*(a31*xv1 - E3 + a32*xv2 + a33*xv3)
t := -((2*K1*(a11*gx1 + a12*gx2 + a13*gx3)*(a11*xv1 - E1 + a12*xv2 + a13*xv3) + 2*K2*(a21*gx1 + a22*gx2 + a23*gx3)*(a21*xv1 - E2 + a22*xv2 + a23*xv3) + 2*K3*(a31*gx1 + a32*gx2 + a33*gx3)*(a31*xv1 - E3 + a32*xv2 + a33*xv3))/(2*K1*(a11*gx1 + a12*gx2 + a13*gx3)^2 + 2*K2*(a21*gx1 + a22*gx2 + a23*gx3)^2 + 2*K3*(a31*gx1 + a32*gx2 + a33*gx3)^2))  # error: Эта переменная не определена.
dg(t) := 2*K1*(a11*gx1 + a12*gx2 + a13*gx3)*(a11*xv1 - E1 + a12*xv2 + a13*xv3 + a11*gx1*t + a12*gx2*t + a13*gx3*t) + 2*K2*(a21*gx1 + a22*gx2 + a23*gx3)*(a21*xv1 - E2 + a22*xv2 + a23*xv3 + a21*gx1*t + a22*gx2*t + a23*gx3*t) + 2*K3*(a31*gx1 + a32*gx2 + a33*gx3)*(a31*xv1 - E3 + a32*xv2 + a33*xv3 + a31*gx1*t + a32*gx2*t + a33*gx3*t)  # error: Эта переменная не определена.
dg(-((2*K1*(a11*gx1 + a12*gx2 + a13*gx3)*(a11*xv1 - E1 + a12*xv2 + a13*xv3) + 2*K2*(a21*gx1 + a22*gx2 + a23*gx3)*(a21*xv1 - E2 + a22*xv2 + a23*xv3) + 2*K3*(a31*gx1 + a32*gx2 + a33*gx3)*(a31*xv1 - E3 + a32*xv2 + a33*xv3))/(2*K1*(a11*gx1 + a12*gx2 + a13*gx3)^2 + 2*K2*(a21*gx1 + a22*gx2 + a23*gx3)^2 + 2*K3*(a31*gx1 + a32*gx2 + a33*gx3)^2))) simplify → 0
